// SBML level 2 version 4

model Montjourides_bioRxiv2024()

  // Compartments:
  compartment FT = 1;
  compartment B1 = 1;
  compartment DGS = 1;

  // Species:
  species CO2aq_FT in FT = 0.2267574;
  species HCO3_FT in FT = 3.278151;
  species CO32_FT in FT = 0.001;
  species H_FT in FT = 2.511886e-5;
  species OH_FT in FT = 0.0003981072;
  species NH4_FT in FT = 0;
  species NH3_FT in FT = 0;
  species NO2_FT in FT = 0;
  species Fishweight_FT in FT = 70;
  species Fish_Biomass_FT in FT = 36750;
  species CO2aq_B1 in B1 = 0.2267574;
  species HCO3_B1 in B1 = 3.278151;
  species CO32_B1 in B1 = 0.001;
  species H_B1 in B1 = 2.511886e-5;
  species OH_B1 in B1 = 0.0003162278;
  species NH4_B1 in B1 = 0;
  species NH3_B1 in B1 = 0;
  species NO2_B1 in B1 = 0;
  species AOB_B1 in B1 = 960000;
  species NOB_B1 in B1 = 480000;
  species CO2aq_DGS in DGS = 0.2267574;
  species HCO3_DGS in DGS = 3.278151;
  species CO32_DGS in DGS = 0.001;
  species H_DGS in DGS = 2.511886e-5;
  species OH_DGS in DGS = 0.0003981072;
  species NH4_DGS in DGS = 0;
  species NH3_DGS in DGS = 0;
  species NO2_DGS in DGS = 0;

  // Parameters:
  F = 1;
  k1 = 0.0149;
  k_1 = 18.9;
  kH = 25.05936;
  k_H = 50000000;
  k3 = 1.4;
  k_3 = 3.111111e8;
  k4 = 11.739;
  k_4 = 43000000;
  muAOB = 6.076389e-6;
  muNOB = 7.638889e-6;
  KNH3 = 0.0007142857;
  KAlk = 0.3;
  KNO2 = 0.07142857;
  rhoAOB = 1.157407e-6;
  rhoNOB = 1.157407e-6;
  YAOB = 2.94;
  YNOB = 0.56;
  C_HCO3 = 0.2120644;
  TGC = 2.7;
  Temp = 14;
  w0 = 70;
  V_FT = 1000;
  V_B1 = 800;
  V_DGS = 700;
  Bcap = 1200000;
  exchange_rate = 0.007233796;
  r_deg = 0.0015;
  K_amm = 2.73e-10;
  OH_dose = 2000;
  HCO3_dose = 2000;
  fish_max = 50000;
  co2_resp = 62.5;
  feed_frac = 0.027;
  CO2aq_Sump = 0;
  HCO3_Sump = 1.147353;
  CO32_Sump = 0.001;
  H_Sump = 3.162278e-5;
  OH_Sump = 0.0003162278;
  NH4_Sump = 0;
  NH3_Sump = 0;
  NO2_Sump = 0;

  // Assignment rules:
  day := time/86400;
  ph := 2*3.141593*time/86400;
  co2_diurnal := 1 + 0.274*(1 - cos(ph));
  co2_base := co2_resp*(Fishweight_FT*1e-3)^(-0.3)*1.06^14*(44/32)/3600*Fish_Biomass_FT/1000/44/V_FT;
  CO2P := co2_base*co2_diurnal;
  mod_prop := 1 - 0.9*cos(ph);
  TAN_total := feed_frac*Fish_Biomass_FT*0.46*0.092/14*1000;
  TAN_excr := mod_prop*TAN_total;
  NH3_frac := 1/(1 + H_FT*1e-3/K_amm);
  NH3_excr := NH3_frac*TAN_excr;
  NH4_excr := (1 - NH3_frac)*TAN_excr;
  dweight := 3*TGC*Temp/(86400*1000)*(w0^(1/3) + TGC*Temp*time/(86400*1000))^2;
  aob_kin := muAOB*(NH3_B1/(KNH3 + NH3_B1))*(HCO3_B1/(KAlk + HCO3_B1))*AOB_B1;
  nob_kin := muNOB*(NO2_B1/(NO2_B1 + KNO2))*NOB_B1;
  add_HCO3 := piecewise(0.0001*HCO3_dose/V_B1/(1 + (HCO3_B1/(200/50.04))^10), (day <= 14) || ((day > 56) && (day <= 70)) || ((day > 98) && (day <= 112)) || ((day > 140) && (day <= 154)), 0);
  T_HCO3_OH := piecewise(100/50.04, (day > 14) && (day <= 42), 70/50.04, (day > 42) && (day <= 56), 100/50.04, (day > 70) && (day <= 84), 70/50.04, (day > 84) && (day <= 98), 70/50.04, (day > 112) && (day <= 140), 1e6);
  T_H_OH := 0.79e-6*1e3*CO2aq_B1/T_HCO3_OH;
  add_OH := piecewise(0.0001*OH_dose/V_B1/(1 + (T_H_OH/H_B1)^10), ((day > 14) && (day <= 56)) || ((day > 70) && (day <= 98)) || ((day > 112) && (day <= 140)), 0);

  // Rate rules:
  CO2aq_FT' = k_1*H_FT*HCO3_FT - k1*CO2aq_FT + CO2P + (CO2aq_DGS - CO2aq_FT)*F/V_FT;
  HCO3_FT' = k1*CO2aq_FT - k_1*H_FT*HCO3_FT + k_H*H_FT*CO32_FT - kH*HCO3_FT + (HCO3_DGS - HCO3_FT)*F/V_FT;
  CO32_FT' = kH*HCO3_FT - k_H*H_FT*CO32_FT + (CO32_DGS - CO32_FT)*F/V_FT;
  H_FT' = k4*NH4_FT - k_4*NH3_FT*H_FT + k1*CO2aq_FT - k_1*H_FT*HCO3_FT + kH*HCO3_FT - k_H*H_FT*CO32_FT + k3 - k_3*H_FT*OH_FT + (H_DGS - H_FT)*F/V_FT;
  OH_FT' = k3 - k_3*H_FT*OH_FT + (OH_DGS - OH_FT)*F/V_FT;
  NH4_FT' = -k4*NH4_FT + k_4*NH3_FT*H_FT + NH4_excr/86400/V_FT + (NH4_DGS - NH4_FT)*F/V_FT;
  NH3_FT' = k4*NH4_FT - k_4*NH3_FT*H_FT + NH3_excr/86400/V_FT + (NH3_DGS - NH3_FT)*F/V_FT;
  NO2_FT' = (NO2_DGS - NO2_FT)*F/V_FT;
  Fishweight_FT' = dweight;
  Fish_Biomass_FT' = Fish_Biomass_FT/Fishweight_FT*dweight;
  CO2aq_B1' = k_1*H_B1*HCO3_B1 - k1*CO2aq_B1 + (CO2aq_FT - CO2aq_B1)*F/V_B1;
  HCO3_B1' = k1*CO2aq_B1 - k_1*H_B1*HCO3_B1 + k_H*H_B1*CO32_B1 - kH*HCO3_B1 - aob_kin*C_HCO3/V_B1 + add_HCO3 + (HCO3_FT - HCO3_B1)*F/V_B1;
  CO32_B1' = kH*HCO3_B1 - k_H*H_B1*CO32_B1 + (CO32_FT - CO32_B1)*F/V_B1;
  H_B1' = k4*NH4_B1 - k_4*NH3_B1*H_B1 + k1*CO2aq_B1 - k_1*H_B1*HCO3_B1 + kH*HCO3_B1 - k_H*H_B1*CO32_B1 + k3 - k_3*H_B1*OH_B1 + (H_FT - H_B1)*F/V_B1;
  OH_B1' = k3 - k_3*H_B1*OH_B1 + add_OH + (OH_FT - OH_B1)*F/V_B1;
  NH4_B1' = -k4*NH4_B1 + k_4*NH3_B1*H_B1 + (NH4_FT - NH4_B1)*F/V_B1;
  NH3_B1' = k4*NH4_B1 - k_4*NH3_B1*H_B1 - aob_kin/V_B1/YAOB + (NH3_FT - NH3_B1)*F/V_B1;
  NO2_B1' = aob_kin/V_B1/YAOB - nob_kin/V_B1/YNOB + (NO2_FT - NO2_B1)*F/V_B1;
  AOB_B1' = aob_kin*(Bcap - AOB_B1 - NOB_B1) - rhoAOB*AOB_B1;
  NOB_B1' = nob_kin*(Bcap - AOB_B1 - NOB_B1) - rhoNOB*NOB_B1;
  CO2aq_DGS' = k_1*H_DGS*HCO3_DGS - k1*CO2aq_DGS - CO2aq_DGS*r_deg + (CO2aq_Sump - CO2aq_DGS)*exchange_rate/V_DGS + (CO2aq_B1 - CO2aq_DGS)*F/V_DGS;
  HCO3_DGS' = k1*CO2aq_DGS - k_1*H_DGS*HCO3_DGS + k_H*H_DGS*CO32_DGS - kH*HCO3_DGS + (HCO3_Sump - HCO3_DGS)*exchange_rate/V_DGS + (HCO3_B1 - HCO3_DGS)*F/V_DGS;
  CO32_DGS' = kH*HCO3_DGS - k_H*H_DGS*CO32_DGS + (CO32_Sump - CO32_DGS)*exchange_rate/V_DGS + (CO32_B1 - CO32_DGS)*F/V_DGS;
  H_DGS' = k4*NH4_DGS - k_4*NH3_DGS*H_DGS + k1*CO2aq_DGS - k_1*H_DGS*HCO3_DGS + kH*HCO3_DGS - k_H*H_DGS*CO32_DGS + k3 - k_3*H_DGS*OH_DGS + (H_Sump - H_DGS)*exchange_rate/V_DGS + (H_B1 - H_DGS)*F/V_DGS;
  OH_DGS' = k3 - k_3*H_DGS*OH_DGS + (OH_Sump - OH_DGS)*exchange_rate/V_DGS + (OH_B1 - OH_DGS)*F/V_DGS;
  NH4_DGS' = -k4*NH4_DGS + k_4*NH3_DGS*H_DGS + (NH4_Sump - NH4_DGS)*exchange_rate/V_DGS + (NH4_B1 - NH4_DGS)*F/V_DGS;
  NH3_DGS' = k4*NH4_DGS - k_4*NH3_DGS*H_DGS + (NH3_Sump - NH3_DGS)*exchange_rate/V_DGS + (NH3_B1 - NH3_DGS)*F/V_DGS;
  NO2_DGS' = (NO2_Sump - NO2_DGS)*exchange_rate/V_DGS + (NO2_B1 - NO2_DGS)*F/V_DGS;
end
